*Heading
** Job name: Job-1 Model name: Model-1
** Generated by: Abaqus/CAE 2021
*Preprint, echo=NO, model=NO, history=NO, contact=NO
**
** PARTS
**
*Part, name=Part-3
*Node
      1,   0.74358362, -0.0978946462,           0.
      2,   0.74358362, -0.0978946462, -0.100000001
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*Element, type=T3D2
1, 1, 2
2, 2, 3
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*Element, type=B31
40, 41, 40
80, 81, 80
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*Nset, nset=Set-1, generate
   1,  672,    1
*Elset, elset=Set-1
    1,    2,    3,    4,    5,    6
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*Nset, nset=Set-2
   1,  40,  41,  80,  81, 120
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*Elset, elset=Set-2
   40,   80,  120,  145,  218,  219
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** Section: Section-1
*Solid Section, elset=Set-1, material=net
4.7124e-05,
** Section: Section-2  Profile: Profile-1
*Beam Section, elset=Set-2, material=Floater, temperature=GRADIENTS, section=CIRC
0.015
0.,0.,-1.
*End Part
**
**
** ASSEMBLY
**
*Assembly, name=Assembly
**
*Instance, name=Part-3-1, part=Part-3
*End Instance
**
*End Assembly
**
** MATERIALS
**
*Material, name=Floater
*Density
 179.7,
*Elastic
 3.42e+06, 0.3
*Material, name=net
*Density
1120.,
*Elastic
 3.5e+08, 0.3
